<?xml version="1.0"?>
<Node 	name="Root" gravity="0 0 0" time="0" animate="0"   >
  <RequiredPlugin pluginName="ContinuousCollision"/>


<VisualStyle displayFlags="hideVisualModels showBehaviorModels showMappings showForceFields" />
<Node 	name="Create here an example of the plugin" >
</Node>
